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/batch
! ANSYS input file written by Workbench version 2022 R2
! File used for geometry attach: D:\Thesis\weld_T.iges
/title,wbnew--Static Structural (A5)
/COM,/COM,     ANSYSMotion, 2022.2
/com,--- Data in consistent MKS units. See Solving Units in the help system for more information.
/units,MKS
/prep7
! Turn off shape checking because checks already performed inside WB mesher.
! See help system for more information.
SHPP,OFF,,NOWARN
etcon,set             ! allow ANSYS to choose best KEYOP's for 180x elements, resets any applicable keyopt to MAPDL defaults
/com,*********** Nodes for the whole assembly ***********
nblock,3,,3599
(1i9,3e20.9e3)
        1     2.316683436E-02    -1.159053426E-03     1.093061730E-02
        2     2.316683436E-02    -1.159053426E-03     1.000000000E-02
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-1
/com,*********** Elements for Body 1 "weld_T-FreeParts" ***********
et,1,186
keyo,1,2,1          ! set full integration on SOLID186
eblock,19,solid,,336
(19i9)
        1        1        1        1        0        0        0        0       20        0      172     1212     1747     1773     1775     1497     1772     1774     1786
     1801     3202     3240     1802     2701     3238     3241     2702     1799     3201     3239     3243
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-1
/com,*********** Elements for Body 2 "weld_T-FreeParts[2]" ***********
et,2,186
keyo,2,2,1          ! set full integration on SOLID186
eblock,19,solid,,105
(19i9)
        2        2        2        2        0        0        0        0       20        0       23      236      402      396      394      237      332      333      334
      680      990      988      679      683      893      895      684      678      894      896      898
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-1
/com,*********** Elements for Body 3 "weld_T-FreeParts[3]" ***********
et,3,186
keyo,3,2,1          ! set full integration on SOLID186
eblock,19,solid,,44
(19i9)
        3        3        3        3        0        0        0        0       20        0      128     1001     1059     1040     1040     1011     1060     1039     1039
     1066     1184     1040     1065     1115     1182     1039     1114     1062     1211     1181     1181
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-1
/com,*********** Elements for Body 4 "weld_T-FreeParts[4]" ***********
et,4,186
keyo,4,2,1          ! set full integration on SOLID186
eblock,19,solid,,22
(19i9)
        4        4        4        4        0        0        0        0       20        0        1       16       27       48       48       17       28       47       47
       91      123       48       92       94      125       47       95       90      122      152      152
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-1
/com,*********** Send User Defined Coordinate System(s) ***********
csys,0
toffst,273.15,  ! Temperature offset from absolute zero
/com,*********** Set Reference Temperature ***********
tref,22.
/com,*********** Send Materials ***********
Temperature = 'TEMP' ! Temperature
MP,DENS,1,7850,	! kg m^-3
MP,ALPX,1,1.2e-05,	! C^-1
MP,C,1,434,	! J kg^-1 C^-1
MP,KXX,1,60.5,	! W m^-1 C^-1
MP,RSVX,1,1.7e-07,	! kg m^3 A^-2 s^-3
MP,EX,1,200000000000,	! Pa
MP,NUXY,1,0.3,
MP,MURX,1,10000,

Temperature = 'TEMP' ! Temperature
MP,DENS,2,7850,	! kg m^-3
MP,ALPX,2,1.2e-05,	! C^-1
MP,C,2,434,	! J kg^-1 C^-1
MP,KXX,2,60.5,	! W m^-1 C^-1
MP,RSVX,2,1.7e-07,	! kg m^3 A^-2 s^-3
MP,EX,2,200000000000,	! Pa
MP,NUXY,2,0.3,
MP,MURX,2,10000,

Temperature = 'TEMP' ! Temperature
MP,DENS,3,7850,	! kg m^-3
MP,ALPX,3,1.2e-05,	! C^-1
MP,C,3,434,	! J kg^-1 C^-1
MP,KXX,3,60.5,	! W m^-1 C^-1
MP,RSVX,3,1.7e-07,	! kg m^3 A^-2 s^-3
MP,EX,3,200000000000,	! Pa
MP,NUXY,3,0.3,
MP,MURX,3,10000,

Temperature = 'TEMP' ! Temperature
MP,DENS,4,7850,	! kg m^-3
MP,ALPX,4,1.2e-05,	! C^-1
MP,C,4,434,	! J kg^-1 C^-1
MP,KXX,4,60.5,	! W m^-1 C^-1
MP,RSVX,4,1.7e-07,	! kg m^3 A^-2 s^-3
MP,EX,4,200000000000,	! Pa
MP,NUXY,4,0.3,
MP,MURX,4,10000,

!************************* Model Summary ********************
!weld_T-FreeParts,	Structural Steel,	matid,	1
!weld_T-FreeParts[2],	Structural Steel,	matid,	2
!weld_T-FreeParts[3],	Structural Steel,	matid,	3
!weld_T-FreeParts[4],	Structural Steel,	matid,	4
!************************* End Model Summary ********************
/com,*********** Create Contact "Frictionless - weld_T-FreeParts To weld_T-FreeParts[2]" ***********
*set,tid,6
*set,cid,5
r,tid
r,cid
et,tid,170
et,cid,174
eblock,10,,,16
(15i9)
     1302        6        6        6        0     1565     1566     1555     1554     2855     2835     2832     2833
     1303        6        6        6        0     1576     1577     1566     1565     2878     2858     2855     2856
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-1
eblock,10,,,16
(15i9)
     1318        5        5        5        0     1565     1566     1555     1554     2855     2835     2832     2833
     1319        5        5        5        0     1576     1577     1566     1565     2878     2858     2855     2856
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-1
eblock,10,,,7
(15i9)
     1334        5        6        5        0      395      403      321      348      989      871      870      925
     1335        5        6        5        0      403      404      322      321      996      873      869      871
     1336        5        6        5        0      404      405      323      322      997      875      872      873
     1337        5        6        5        0      405      406      324      323      998      877      874      875
     1338        5        6        5        0      406      407      325      324      999      879      876      877
     1339        5        6        5        0      407      408      326      325     1000      881      878      879
     1340        5        6        5        0      408      379      364      326      972      956      880      881
-1
eblock,10,,,7
(15i9)
     1341        6        5        6        0      395      403      321      348      989      871      870      925
     1342        6        5        6        0      403      404      322      321      996      873      869      871
     1343        6        5        6        0      404      405      323      322      997      875      872      873
     1344        6        5        6        0      405      406      324      323      998      877      874      875
     1345        6        5        6        0      406      407      325      324      999      879      876      877
     1346        6        5        6        0      407      408      326      325     1000      881      878      879
     1347        6        5        6        0      408      379      364      326      972      956      880      881
-1
keyo,cid,8,2               ! auto create asymmetric contact (from Program Controlled setting)
keyo,cid,10,0              ! adjust contact stiffness each NR iteration (from Program Controlled setting)
keyo,cid,12,0              ! standard contact
keyo,cid,18,1              ! small sliding turned on by application
keyo,cid,2,0               ! augmented Lagrange (from Program Controlled setting)
keyo,cid,4,0               ! on Gauss point (from Program Controlled setting)
keyo,cid,9,0               ! use real geometry with stepped effects
keyo,cid,7,0               ! No Prediction
rmod,tid,3,1.       ! FKN
rmod,tid,5,0.       ! ICONT
rmod,tid,6,0.       ! PINB
rmod,tid,10,0.      ! CNOF
rmod,tid,12,0.      ! FKT
rmod,tid,36,35      ! WB DSID
rmod,cid,3,1.       ! FKN
rmod,cid,5,0.       ! ICONT
rmod,cid,6,0.       ! PINB
rmod,cid,10,0.      ! CNOF
rmod,cid,12,0.      ! FKT
rmod,cid,36,35      ! WB DSID
/com,*********** Create Contact "Contact Region 2" ***********
*set,tid,8
*set,cid,7
r,tid
r,cid
et,tid,170
et,cid,174
eblock,10,,,8
(15i9)
     1348        8        8        8        0     1565     1566     1555     1554     2855     2835     2832     2833
     1349        8        8        8        0     1566     1567     1556     1555     2857     2837     2834     2835
     1350        8        8        8        0     1567     1568     1557     1556     2859     2839     2836     2837
     1351        8        8        8        0     1568     1569     1558     1557     2861     2841     2838     2839
     1352        8        8        8        0     1569     1570     1559     1558     2863     2843     2840     2841
     1353        8        8        8        0     1570     1571     1560     1559     2865     2845     2842     2843
     1354        8        8        8        0     1571     1572     1561     1560     2867     2847     2844     2845
     1355        8        8        8        0     1572     1573     1562     1561     2869     2849     2846     2847
-1
eblock,10,,,8
(15i9)
     1356        7        7        7        0     1565     1566     1555     1554     2855     2835     2832     2833
     1357        7        7        7        0     1566     1567     1556     1555     2857     2837     2834     2835
     1358        7        7        7        0     1567     1568     1557     1556     2859     2839     2836     2837
     1359        7        7        7        0     1568     1569     1558     1557     2861     2841     2838     2839
     1360        7        7        7        0     1569     1570     1559     1558     2863     2843     2840     2841
     1361        7        7        7        0     1570     1571     1560     1559     2865     2845     2842     2843
     1362        7        7        7        0     1571     1572     1561     1560     2867     2847     2844     2845
     1363        7        7        7        0     1572     1573     1562     1561     2869     2849     2846     2847
-1
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eblock,10,,,11
(15i9)
     1375        8        7        8        0     1016     1027     1038     1015     1127     1158     1126     1125
     1376        8        7        8        0     1027     1026     1037     1038     1155     1156     1178     1158
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-1
keyo,cid,8,2               ! auto create asymmetric contact (from Program Controlled setting)
keyo,cid,10,0              ! adjust contact stiffness each NR iteration (from Program Controlled setting)
keyo,cid,12,5              ! bonded always
keyo,cid,18,1              ! small sliding turned on by application
keyo,cid,2,0               ! augmented Lagrange (from Program Controlled setting)
keyo,cid,4,0               ! on Gauss point (from Program Controlled setting)
keyo,cid,9,1               ! ignore initial gaps/penetration
keyo,cid,7,0               ! No Prediction
rmod,tid,3,1.       ! FKN
rmod,tid,5,0.       ! ICONT
rmod,tid,6,0.       ! PINB
rmod,tid,10,0.      ! CNOF
rmod,tid,12,0.      ! FKT
rmod,tid,36,38      ! WB DSID
rmod,cid,3,1.       ! FKN
rmod,cid,5,0.       ! ICONT
rmod,cid,6,0.       ! PINB
rmod,cid,10,0.      ! CNOF
rmod,cid,12,0.      ! FKT
rmod,cid,36,38      ! WB DSID
/com,*********** Create Contact "Contact Region 3" ***********
*set,tid,10
*set,cid,9
r,tid
r,cid
et,tid,170
et,cid,174
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eblock,10,,,11
(15i9)
     1413       10        9       10        0       28       17       16       27       94       90       91      122
     1414       10        9       10        0       29       18       17       28       97       93       94      124
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-1
keyo,cid,8,2               ! auto create asymmetric contact (from Program Controlled setting)
keyo,cid,10,0              ! adjust contact stiffness each NR iteration (from Program Controlled setting)
keyo,cid,12,5              ! bonded always
keyo,cid,18,1              ! small sliding turned on by application
keyo,cid,2,0               ! augmented Lagrange (from Program Controlled setting)
keyo,cid,4,0               ! on Gauss point (from Program Controlled setting)
keyo,cid,9,1               ! ignore initial gaps/penetration
keyo,cid,7,0               ! No Prediction
rmod,tid,3,1.       ! FKN
rmod,tid,5,0.       ! ICONT
rmod,tid,6,0.       ! PINB
rmod,tid,10,0.      ! CNOF
rmod,tid,12,0.      ! FKT
rmod,tid,36,41      ! WB DSID
rmod,cid,3,1.       ! FKN
rmod,cid,5,0.       ! ICONT
rmod,cid,6,0.       ! PINB
rmod,cid,10,0.      ! CNOF
rmod,cid,12,0.      ! FKT
rmod,cid,36,41      ! WB DSID
/com,*********** Create Contact "Contact Region 4" ***********
*set,tid,12
*set,cid,11
r,tid
r,cid
et,tid,170
et,cid,174
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eblock,10,,,22
(15i9)
     1460       12       11       12        0     1049     1050     1013     1014     1201     1122     1120     1124
     1461       12       11       12        0     1048     1051     1050     1049     1200     1202     1201     1199
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-1
keyo,cid,8,2               ! auto create asymmetric contact (from Program Controlled setting)
keyo,cid,10,0              ! adjust contact stiffness each NR iteration (from Program Controlled setting)
keyo,cid,12,5              ! bonded always
keyo,cid,18,1              ! small sliding turned on by application
keyo,cid,2,0               ! augmented Lagrange (from Program Controlled setting)
keyo,cid,4,0               ! on Gauss point (from Program Controlled setting)
keyo,cid,9,1               ! ignore initial gaps/penetration
keyo,cid,7,0               ! No Prediction
rmod,tid,3,1.       ! FKN
rmod,tid,5,0.       ! ICONT
rmod,tid,6,0.       ! PINB
rmod,tid,10,0.      ! CNOF
rmod,tid,12,0.      ! FKT
rmod,tid,36,44      ! WB DSID
rmod,cid,3,1.       ! FKN
rmod,cid,5,0.       ! ICONT
rmod,cid,6,0.       ! PINB
rmod,cid,10,0.      ! CNOF
rmod,cid,12,0.      ! FKT
rmod,cid,36,44      ! WB DSID
/com,*********** Create Contact "Contact Region 5" ***********
*set,tid,14
*set,cid,13
r,tid
r,cid
et,tid,170
et,cid,174
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eblock,10,,,22
(15i9)
     1518       14       13       14        0       37       38        1        2      142       52       49       54
     1519       14       13       14        0       36       39       38       37      141      143      142      140
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-1
keyo,cid,8,2               ! auto create asymmetric contact (from Program Controlled setting)
keyo,cid,10,0              ! adjust contact stiffness each NR iteration (from Program Controlled setting)
keyo,cid,12,5              ! bonded always
keyo,cid,18,1              ! small sliding turned on by application
keyo,cid,2,0               ! augmented Lagrange (from Program Controlled setting)
keyo,cid,4,0               ! on Gauss point (from Program Controlled setting)
keyo,cid,9,1               ! ignore initial gaps/penetration
keyo,cid,7,0               ! No Prediction
rmod,tid,3,1.       ! FKN
rmod,tid,5,0.       ! ICONT
rmod,tid,6,0.       ! PINB
rmod,tid,10,0.      ! CNOF
rmod,tid,12,0.      ! FKT
rmod,tid,36,47      ! WB DSID
rmod,cid,3,1.       ! FKN
rmod,cid,5,0.       ! ICONT
rmod,cid,6,0.       ! PINB
rmod,cid,10,0.      ! CNOF
rmod,cid,12,0.      ! FKT
rmod,cid,36,47      ! WB DSID
nsel,all
esel,all
/com,******* Constant Zero Displacement X *******
CMBLOCK,_DISPZEROUX,NODE,      557
(8i10)
      1355      1356      1357      1358      1359      1360      1361      1362
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cmsel,s,_DISPZEROUX
d,all,ux,0
nsel,all
/com,******* Constant Zero Displacement Y *******
CMBLOCK,_DISPZEROUY,NODE,      557
(8i10)
      1355      1356      1357      1358      1359      1360      1361      1362
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cmsel,s,_DISPZEROUY
d,all,uy,0
nsel,all
/com,******* Constant Zero Displacement Z *******
CMBLOCK,_DISPZEROUZ,NODE,      557
(8i10)
      1355      1356      1357      1358      1359      1360      1361      1362
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cmsel,s,_DISPZEROUZ
d,all,uz,0
nsel,all
/com,*********** Define Force Using Surface Effect Elements ***********
local,12,0,0.,0.,0.,0.,0.,0.
csys,0
et,15,154
eblock,10,,,105
(15i9)
     1540       15       15       15       12      334      237      332      333      684      683      893      895
     1541       15       15       15       12      335      243      237      334      702      682      684      897
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-1
esel,s,type,,15
keyop,15,2,1                ! Apply load in local coordinate system
keyop,15,7,1                ! Use original area so load is constant in large deformation
esel,all
fini
/com,****************************************************************************
/com,*************************    SOLUTION       ********************************
/com,****************************************************************************
/solu
antype,0                   ! static analysis
_thickRatio=  0     ! Ratio of thick parts in the model
eqsl,sparse,,,,,1
cntr,print,1               ! print out contact info and also make no initial contact an error
dmpoption,emat,no             ! Don't combine emat file for DANSYS
dmpoption,esav,no             ! Don't combine esav file for DANSYS
nldiag,cont,iter           ! print out contact info each equilibrium iteration
rescontrol,define,last,last,,dele	   ! Program Controlled
/com,****************************************************
/com,******************* SOLVE FOR LS 1 OF 1 ****************
esel,s,type,,15
nsle
sfe,all,1,pres,1,0.
sfe,all,2,pres,1,64747.7327591793
sfe,all,3,pres,1,0.
nsel,all
esel,all
autots,on                  ! Workbench Program Controlled automatic time stepping
nsub,1,10,1                ! due to presence of general nonlinear
time,1.
outres,erase
outres,all,none
outres,nsol,all,
outres,rsol,all
outres,eangl,all
outres,etmp,all
outres,veng,all
outres,strs,all,
outres,epel,all,
outres,eppl,all,
outres,cont,all,
! *********** WB SOLVE COMMAND ***********
! check interactive state
*get,ANSINTER_,active,,int
*if,ANSINTER_,ne,0,then
/eof
*endif
solve
/com *************** Write FE CONNECTORS *********
CEWRITE,file,ce,,INTE
/com,****************************************************
/com,*************** FINISHED SOLVE FOR LS 1 *************
*get,_NSOLTHREADS,active,0,ntfs
*get,_NSOLPROCESSES,active,0,npfs
/post1
fini
