*Heading
** Job name: Job-1 Model name: 2DAnalysis
** Generated by: Abaqus/CAE Learning Edition 2023
*Preprint, echo=NO, model=NO, history=NO, contact=NO
**
** PARTS
**
*Part, name=Part-1
*Node
      1,          50.,          10.,           0.
      2,          45.,          10.,           0.
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*Element, type=S4
 1,   1,   2,  23,  22
 2,   2,   3,  24,  23
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*Nset, nset=_PickedSet2, internal, generate
   1,  105,    1
*Elset, elset=_PickedSet2, internal, generate
  1,  80,   1
*Nset, nset=BC_Set, generate
  21,  105,   21
*Nset, nset=Load, generate
  1,  85,  21
** Section: Plane_4
*Shell Section, elset=_PickedSet2, material=Steel
4., 5
*End Part
**
**
** ASSEMBLY
**
*Assembly, name=Assembly
**
*Instance, name=Part-1-1, part=Part-1
*End Instance
**
*End Assembly
**
** MATERIALS
**
*Material, name=Steel
*Density
 7.85e-09,
*Elastic
210000., 0.3
** ----------------------------------------------------------------
**
** STEP: twoDAnalyse
**
*Step, name=twoDAnalyse, nlgeom=NO
*Static
1., 1., 1e-05, 1.
**
** BOUNDARY CONDITIONS
**
** Name: BC-1 Type: Symmetry/Antisymmetry/Encastre
*Boundary
Part-1-1.BC_Set, ENCASTRE
**
** LOADS
**
** Name: Load-1   Type: Concentrated force
*Cload
Part-1-1.Load, 3, -40.
**
** OUTPUT REQUESTS
**
*Restart, write, frequency=0
**
** FIELD OUTPUT: F-Output-1
**
*Output, field, variable=PRESELECT
**
** HISTORY OUTPUT: H-Output-1
**
*Output, history, variable=PRESELECT
*End Step
