**
**ANSA_VERSION;23.0.0;
**
**
** file created by  A N S A  Mon Aug 14 13:39:01 2023
**
** output from :
**
** G:/Abaqus CAE/2_Course_Material/05_Linear_Static_Analysis/02_Beam_Bracket/Beam
** _Bracket.ansa
**
** Settings :
**
** Output format : 2019
**
** Output : All
**
*HEADING

**
**
**
*NODE
       1,                     -2.5,                     -30.,       -4.999999999999999
       2,                      2.5,                     -30.,       -5.000000000000001
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**
** SOLID ELEMENTS
**
*ELEMENT, TYPE=C3D8, ELSET=P29;Beam_Bracket
      63,        5,       22,       32,      143,      482,      497,      487,      480
      68,        7,        3,       95,       19,      517,      479,      524,      504
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*ELEMENT, TYPE=C3D6, ELSET=P29;Beam_Bracket
     162,       72,      122,       10,      616,      630,      605
     234,      152,      156,       18,     1076,     1029,     1019
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**
**
**
**
**
**
**
** SECTION DATA
**
*SOLID SECTION, ELSET=P29;Beam_Bracket, MATERIAL=M4;Steel
**
** MATERIALS
**
*MATERIAL, NAME=M4;Steel
*DENSITY
                 7.85E-9,
*ELASTIC, TYPE=ISOTROPIC
                 210000.,                      0.3
**
**
**
**ANSA_COLOR;29;SOLID_SECTION;.521568655967712;.164705887436867;.866666674613953;
**1.;
**ANSA_COLOR;4;MATERIAL;.839215695858002;.796078443527222;.713725507259369;1.;
**ANSA_USER_ATTRIBUTES;SOLID_SECTION;User/cad_material;TEXT;RW;YES;;;
**ANSA_PART;PART;ID;1;MID;model1;NAME;model1;BELONGS_HERE;YES;STUDY_VERSION;0;PID
**_OFFSET;0;COLOR;201;236;118;0;IS_COLOR_ACTIVE;1;PART_TYPE;Undefined;CONTAINS;SO
**LID_SECTION;29;
