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/batch
! ANSYS input file written by Workbench version 2022 R2
! File used for geometry attach: D:\Thesis\PEC_columbus.iges
/title,PEC_fatigue--Transient (C5)
/COM,/COM,     ANSYSMotion, 2022.2
/com,--- Data in consistent MKS units. See Solving Units in the help system for more information.
/units,MKS
/prep7
! Turn off shape checking because checks already performed inside WB mesher.
! See help system for more information.
SHPP,OFF,,NOWARN
etcon,set             ! allow ANSYS to choose best KEYOP's for 180x elements, resets any applicable keyopt to MAPDL defaults
/com,*********** Nodes for the whole assembly ***********
nblock,3,,7525
(1i9,3e20.9e3)
        1    -5.612902966E-02     1.009475191E-01    -2.843441486E-04
        2    -5.612902892E-02     1.009152264E-01    -1.202182832E-03
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-1
/com,*********** Nodes for all Remote Points ***********
nblock,3
(1i9,3e20.9e3)
     6842     0.000000000E+00     9.997424875E-02     8.306420641E-20
     6843     0.000000000E+00     9.997424875E-02     8.306420641E-20
-1
/com,*********** Elements for Body 1 "PEC_columbus-FreeParts" ***********
et,1,187
eblock,19,solid,,1965
(19i9)
        1        1        1        1        0        0        0        0       10        0      533     2763     2930     3129     2989     5169     5966     5171     5170
     5961     6296
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-1
/com,*********** Elements for Body 2 "PEC_columbus-FreeParts[2]" ***********
et,2,187
eblock,19,solid,,191
(19i9)
        2        2        2        2        0        0        0        0       10        0      342     1856     1870     1861     1871     2026     2051     2024     2027
     2090     2052
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-1
/com,*********** Elements for Body 3 "PEC_columbus-FreeParts[3]" ***********
et,3,186
keyo,3,2,1          ! set full integration on SOLID186
eblock,19,solid,,341
(19i9)
        3        3        3        3        0        0        0        0       20        0        1        1        4        8        7      248      245      241      242
      514      527      540      515     1312     1303     1301     1306      517      529      545      542
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-1
/com,*********** Send User Defined Coordinate System(s) ***********
local,12,0,0.,9.99742487507333e-002,8.30642064063864e-020,-4.2964952914991e-031,7.01670929853488e-015,90.
csys,0
toffst,273.15,  ! Temperature offset from absolute zero
/com,*********** Set Reference Temperature ***********
tref,22.
/com,*********** Send Materials ***********
Temperature = 'TEMP' ! Temperature
MP,DENS,1,7850,	! kg m^-3
MP,ALPX,1,1.2e-05,	! C^-1
MP,C,1,434,	! J kg^-1 C^-1
MP,KXX,1,60.5,	! W m^-1 C^-1
MP,RSVX,1,1.7e-07,	! kg m^3 A^-2 s^-3
MP,EX,1,200000000000,	! Pa
MP,NUXY,1,0.3,
MP,MURX,1,10000,

Temperature = 'TEMP' ! Temperature
MP,DENS,2,7850,	! kg m^-3
MP,ALPX,2,1.2e-05,	! C^-1
MP,C,2,434,	! J kg^-1 C^-1
MP,KXX,2,60.5,	! W m^-1 C^-1
MP,RSVX,2,1.7e-07,	! kg m^3 A^-2 s^-3
MP,EX,2,200000000000,	! Pa
MP,NUXY,2,0.3,
MP,MURX,2,10000,

Temperature = 'TEMP' ! Temperature
MP,DENS,3,7850,	! kg m^-3
MP,ALPX,3,1.2e-05,	! C^-1
MP,C,3,434,	! J kg^-1 C^-1
MP,KXX,3,60.5,	! W m^-1 C^-1
MP,RSVX,3,1.7e-07,	! kg m^3 A^-2 s^-3
MP,EX,3,200000000000,	! Pa
MP,NUXY,3,0.3,
MP,MURX,3,10000,

!************************* Model Summary ********************
!PEC_columbus-FreeParts,	Structural Steel,	matid,	1
!PEC_columbus-FreeParts[2],	Structural Steel,	matid,	2
!PEC_columbus-FreeParts[3],	Structural Steel,	matid,	3
!************************* End Model Summary ********************
/com,*********** Create Contact "Frictionless - PEC_columbus-FreeParts To PEC_columbus-FreeParts[3]" ***********
*set,tid,5
*set,cid,4
r,tid
r,cid
et,tid,170
et,cid,174
eblock,10,,,32
(15i9)
     4659        5        5        5        0     2342     2351     2343     2343     3203     3210     2343     3202
     4660        5        5        5        0     2343     2351     2344     2344     3210     3217     2344     3209
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-1
eblock,10,,,32
(15i9)
     4691        4        4        4        0     2342     2351     2343     2343     3203     3210     2343     3202
     4692        4        4        4        0     2343     2351     2344     2344     3210     3217     2344     3209
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-1
eblock,10,,,248
(15i9)
     4723        4        5        4        0      475      482      512      265     1804     1811     1356     1355
     4724        4        5        4        0      468      483      257      263     1796     1339     1338     1351
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-1
eblock,10,,,248
(15i9)
     4971        5        4        5        0      475      482      512      265     1804     1811     1356     1355
     4972        5        4        5        0      468      483      257      263     1796     1339     1338     1351
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-1
keyo,cid,8,2               ! auto create asymmetric contact (from Program Controlled setting)
keyo,cid,10,0              ! adjust contact stiffness each NR iteration (from Program Controlled setting)
keyo,cid,12,0              ! standard contact
keyo,cid,2,0               ! augmented Lagrange (from Program Controlled setting)
keyo,cid,4,0               ! on Gauss point (from Program Controlled setting)
keyo,cid,9,0               ! use real geometry with stepped effects
keyo,cid,7,0               ! No Prediction
rmod,tid,3,1.       ! FKN
rmod,tid,5,0.       ! ICONT
rmod,tid,6,0.       ! PINB
rmod,tid,10,0.      ! CNOF
rmod,tid,12,0.      ! FKT
rmod,tid,36,32      ! WB DSID
rmod,cid,3,1.       ! FKN
rmod,cid,5,0.       ! ICONT
rmod,cid,6,0.       ! PINB
rmod,cid,10,0.      ! CNOF
rmod,cid,12,0.      ! FKT
rmod,cid,36,32      ! WB DSID
/com,*********** Create Contact "Contact Region 2" ***********
*set,tid,7
*set,cid,6
r,tid
r,cid
et,tid,170
et,cid,174
eblock,10,,,18
(15i9)
     5219        7        7        7        0     1912     1914     1939     1939     2271     2282     1939     2274
     5220        7        7        7        0     1911     1910     1915     1915     2264     2265     1915     2269
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-1
eblock,10,,,18
(15i9)
     5237        6        6        6        0     1912     1914     1939     1939     2271     2282     1939     2274
     5238        6        6        6        0     1911     1910     1915     1915     2264     2265     1915     2269
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-1
eblock,10,,,24
(15i9)
     5255        6        7        6        0      363      356      499      498     1556     1557     1827     1572
     5256        6        7        6        0      370      363      498      497     1571     1572     1826     1587
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-1
eblock,10,,,24
(15i9)
     5279        7        6        7        0      363      356      499      498     1556     1557     1827     1572
     5280        7        6        7        0      370      363      498      497     1571     1572     1826     1587
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-1
keyo,cid,8,2               ! auto create asymmetric contact (from Program Controlled setting)
keyo,cid,10,0              ! adjust contact stiffness each NR iteration (from Program Controlled setting)
keyo,cid,12,5              ! bonded always
keyo,cid,18,1              ! small sliding turned on by application
keyo,cid,2,0               ! augmented Lagrange (from Program Controlled setting)
keyo,cid,4,0               ! on Gauss point (from Program Controlled setting)
keyo,cid,9,1               ! ignore initial gaps/penetration
keyo,cid,7,0               ! No Prediction
rmod,tid,3,1.       ! FKN
rmod,tid,5,0.       ! ICONT
rmod,tid,6,0.       ! PINB
rmod,tid,10,0.      ! CNOF
rmod,tid,12,0.      ! FKT
rmod,tid,36,35      ! WB DSID
rmod,cid,3,1.       ! FKN
rmod,cid,5,0.       ! ICONT
rmod,cid,6,0.       ! PINB
rmod,cid,10,0.      ! CNOF
rmod,cid,12,0.      ! FKT
rmod,cid,36,35      ! WB DSID
nsel,all
esel,all
/com,******* Constant Zero Displacement X *******
CMBLOCK,_DISPZEROUX,NODE,      825
(8i10)
      2475      2476      2477      2478      2479      2480      2481      2482
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cmsel,s,_DISPZEROUX
d,all,ux,0
nsel,all
/com,******* Constant Zero Displacement Y *******
CMBLOCK,_DISPZEROUY,NODE,      825
(8i10)
      2475      2476      2477      2478      2479      2480      2481      2482
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cmsel,s,_DISPZEROUY
d,all,uy,0
nsel,all
/com,******* Constant Zero Displacement Z *******
CMBLOCK,_DISPZEROUZ,NODE,      825
(8i10)
      2475      2476      2477      2478      2479      2480      2481      2482
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cmsel,s,_DISPZEROUZ
d,all,uz,0
nsel,all
/com,*********** Create Remote Point "Internal Remote Point 2" ***********
! -------- Remote Point Used by "Revolute - Ground To PEC_columbus-FreeParts[3]" --------
*set,tid,9
*set,cid,8
et,cid,174
et,tid,170
keyo,tid,2,1               ! Don't fix the pilot node
keyo,tid,4,0               ! Activate all DOF's due to large deformation
keyo,cid,12,5              ! Bonded Contact
keyo,cid,4,1               ! Deformable RBE3 style load
keyo,cid,2,2               ! MPC style contact
eblock,10,,,248
(15i9)
     5303        8        8        8        0      475      482      512      265     1804     1811     1356     1355
     5304        8        8        8        0      468      483      257      263     1796     1339     1338     1351
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-1
*set,_npilot,6843
_npilot47=_npilot
type,tid
mat ,cid
real,cid
tshape,pilo
en,5551,_npilot
tshape
csys,12
nrot,6843
csys,0
/com,*********** Create Joint "Revolute - Ground To PEC_columbus-FreeParts[3]" ***********
! Joint Element Type Declaration and Definition using MPC184
*set,_jid,10
et,_jid,184
keyo,_jid,1,6           ! Revolute Joint
keyo,_jid,4,1           ! Z Axis is revolute axis
sectype,_jid, joint, revo, _wbjoint
secjoint,,12,12
mat,_jid
real,_jid
type,_jid
secnum,_jid
en,4656,,6843        ! body to ground joint
/com,*********** Define Force Using Surface Effect Elements ***********
local,13,0,0.,0.,0.,0.,0.,0.
csys,0
et,11,154
eblock,10,,,16
(15i9)
     5552       11       11       11       13     1870     1882     1871     1871     2091     2097     1871     2090
     5553       11       11       11       13     1878     1885     1879     1879     2121     2124     1879     2120
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-1
esel,s,type,,11
keyop,11,2,1                ! Apply load in local coordinate system
keyop,11,7,1                ! Use original area so load is constant in large deformation
esel,all
/com,*********** Create Joint Drivers **********
fini
/com,****************************************************************************
/com,*************************    SOLUTION       ********************************
/com,****************************************************************************
/solu
antype,4                   ! transient analysis
nlgeom,on                  ! Turn on Large Deformation Effects
kbc,1                      ! stepped BC's
_thickRatio=0.333   ! Ratio of thick parts in the model
eqsl,sparse,,,,,1
cntr,print,1               ! print out contact info and also make no initial contact an error
dmpoption,emat,no             ! Don't combine emat file for DANSYS
dmpoption,esav,no             ! Don't combine esav file for DANSYS
trnopt,full,,,,,hht        ! HHT time integration method
tintp, mosp			! Choose transient integration settings for moderate speed application
nldiag,cont,iter           ! print out contact info each equilibrium iteration
rescontrol,define,last,last,,dele	   ! Program Controlled
/com,****************************************************
/com,******************* SOLVE FOR LS 1 OF 1 ****************
esel,s,type,,11
nsle
sfe,all,1,pres,1,0.
sfe,all,2,pres,1,-682294.724038958
sfe,all,3,pres,1,0.
nsel,all
esel,all
esel,s,type,,10
dj,all,omgz,1.0471975511966
esel,all
autots,on                   ! User turned on automatic time stepping
deltim,1,0.1,1,OFF
time,1.
timint,on                  ! Turn on time integration effects
outres,erase
outres,all,none
outres,nsol,all,
outres,rsol,all
outres,eangl,all
outres,etmp,all
outres,veng,all
outres,strs,all,
outres,epel,all,
outres,eppl,all,
outres,cont,all,
outres,v,all,
outres,a,all,
esel,s,type,,10
cm,_elmisc,elem
esel,all
outres,misc,all,_elmisc
! *********** WB SOLVE COMMAND ***********
! check interactive state
*get,ANSINTER_,active,,int
*if,ANSINTER_,ne,0,then
/eof
*endif
solve
/com *************** Write FE CONNECTORS *********
CEWRITE,file,ce,,INTE
/com,****************************************************
/com,*************** FINISHED SOLVE FOR LS 1 *************
*get,_NSOLTHREADS,active,0,ntfs
*get,_NSOLPROCESSES,active,0,npfs
/post1
fini
